Clear

New Circuit.IEEE13busIslanded3

! Line codes

Redirect IEEE13busLineCodes_balanced_3phase.dss

! Loads

New Load.632 Bus1=632.1.2.3  	Phases=3 Conn=Wye 	Model=1 kV=4.16   	kW=49.75 	kvar=29
New Load.671 Bus1=671.1.2.3  	Phases=3 Conn=Wye 	Model=1 kV=4.16   	kW=199.75 	kvar=109
New Load.634 Bus1=634.1.2.3     Phases=3 Conn=Wye  	Model=1 kV=4.16  	kW=200  	kvar=115
New Load.645 Bus1=645.1.2.3     Phases=3 Conn=Wye  	Model=1 kV=4.16     	kW=85   	kvar=52
New Load.646 Bus1=646.1.2.3    	Phases=3 Conn=Wye 	Model=1 kV=4.16   	kW=115   	kvar=66
New Load.692 Bus1=692.1.2.3    	Phases=3 Conn=Wye 	Model=1 kV=4.16   	kW=85  	 	kvar=45
New Load.675 Bus1=675.1.2.3    	Phases=3 Conn=Wye  	Model=1 kV=4.16  	kW=324  	kvar=141
New Load.611 Bus1=611.1.2.3     Phases=3 Conn=Wye  	Model=1 kV=4.16 	kW=85   	kvar=40
New Load.652 Bus1=652.1.2.3     Phases=3 Conn=Wye  	Model=1 kV=4.16  	kW=64   	kvar=43

! Lines

New Line.650632    Phases=3 	Bus1=650.1.2.3    Bus2=632.1.2.3 	LineCode=mtx601 Length=2000 units=ft
New Line.632671    Phases=3 	Bus1=632.1.2.3    Bus2=671.1.2.3  	LineCode=mtx601 Length=2000 units=ft
New Line.671680    Phases=3 	Bus1=671.1.2.3    Bus2=680.1.2.3  	LineCode=mtx601 Length=1000 units=ft
New Line.632633    Phases=3 	Bus1=632.1.2.3    Bus2=633.1.2.3  	LineCode=mtx602 Length=500  units=ft
New Line.633634    Phases=3 	Bus1=633.1.2.3    Bus2=634.1.2.3  	LineCode=mtx602 Length=10   units=ft
New Line.632645    Phases=3 	Bus1=632.1.2.3    Bus2=645.1.2.3   	LineCode=mtx601 Length=500  units=ft
New Line.645646    Phases=3 	Bus1=645.1.2.3    Bus2=646.1.2.3    	LineCode=mtx601 Length=300  units=ft
New Line.692675    Phases=3 	Bus1=692.1.2.3    Bus2=675.1.2.3  	LineCode=mtx606 Length=500  units=ft
New Line.671692    Phases=3 	Bus1=671.1.2.3    Bus2=692.1.2.3  	LineCode=mtx606 Length=10   units=ft
New Line.671684    Phases=3 	Bus1=671.1.2.3    Bus2=684.1.2.3    	LineCode=mtx602 Length=300  units=ft
New Line.684611    Phases=3 	Bus1=684.1.2.3    Bus2=611.1.2.3        LineCode=mtx602 Length=300  units=ft
New Line.684652    Phases=3 	Bus1=684.1.2.3    Bus2=652.1.2.3      	LineCode=mtx602 Length=800  units=ft

Set Voltagebases=[4.16]
calcv
Solve
!BusCoords buscoord.dss

!show Y

!-------------------------------------------------------------------------------------------------------------------------
